// SBML level 3 version 1
// Created with https://github.com/matthiaskoenig/sbmlutils.

model dextromethorphan_kidney(Vki, Vurine, dxm, dxo, dxo_glu, dxm_urine, dxo_urine, dxo_glu_urine)
  // Dextromethorphan (DXM) kidney model
  // DXM, DXO, DXO_GLU can be excreted in the urine via the kidneys. The renal filtration and excretion processes are not modeled in detail, but first order irreversible mass-action kinetics are used.",
  // Terms of use
  // The content of this model has been carefully created in a manual research effort. This file has been created by Matthias König using sbmlutils. For questions contact koenigmx@hu-berlin.de. Copyright © 2022 Matthias König.
  // This work is licensed under a Creative Commons Attribution 4.0 International License.
  // Redistribution and use of any part of this model, with or without modification, are permitted provided that the following conditions are met:
  // Redistributions of this SBML file must retain the above copyright notice, this list of conditions and the following disclaimer.
  // Redistributions in a different form must reproduce the above copyright notice, this list of conditions and the following disclaimer in the documentation and/or other materials provided with the distribution.
  // This model is distributed in the hope that it will be useful, but WITHOUT ANY WARRANTY; without even the implied warranty of MERCHANTABILITY or FITNESS FOR A PARTICULAR PURPOSE.
  // model units - substance: mmole, time: min, volume: litre, area: m2, length: metre, extent: mmole

  // Compartments:
  compartment Vki = 0.33 litre; Vki is "kidney";  // SBO:0000290 FMA:7203 BTO:0000671 ncit:C12415
  compartment Vurine = 1 litre;  // SBO:0000290 FMA:12274 ncit:C13283 BTO:0001419
  compartment Vmem = NaN; Vmem has m2; Vmem is "plasma membrane";  // 2-D; SBO:0000290 ncit:C13735 FMA:63841 GO:0005886

  // Species:
  species dxm in Vki = 0; dxm is "dextromethorphan (kidney)";  // SBO:0000247 CHEBI:29133 ncit:C171857 inchikey:JAQUASYNZVUNQP-PVAVHDDUSA-N
  species dxo in Vki = 0; dxo is "dextrorphan (kidney)";  // SBO:0000247 CHEBI:29133 ncit:C171857 inchikey:JAQUASYNZVUNQP-PVAVHDDUSA-N
  species dxo_glu in Vki = 0; dxo_glu is "dextrorphan glucuronide (kidney)";  // SBO:0000247 CHEBI:32645 pubchem.compound:24883428 inchikey:YQAUTKINOXBFCA-DCWOAAMISA-N
  substanceOnly species dxm_urine in Vurine = 0; dxm_urine is "dextromethorphan (urine)";  // SBO:0000247 CHEBI:4470 ncit:C62022 inchikey:MKXZASYAUGDDCJ-NJAFHUGGSA-N
  substanceOnly species dxo_urine in Vurine = 0; dxo_urine is "dextrorphan (urine)";  // SBO:0000247 CHEBI:29133 ncit:C171857 inchikey:JAQUASYNZVUNQP-PVAVHDDUSA-N
  substanceOnly species dxo_glu_urine in Vurine = 0; dxo_glu_urine is "dextrorphan glucuronide (urine)";  // SBO:0000247 CHEBI:32645 pubchem.compound:24883428 inchikey:YQAUTKINOXBFCA-DCWOAAMISA-N

  // Parameters:
  DXMEX_k = 0.017 per_min; DXMEX_k is "DXM urinary excretion rate";  // SBO:0000009
  DXOEX_k = 0.3 per_min; DXOEX_k is "DXO urinary excretion rate";  // SBO:0000009
  DXOGLUEX_k = 10 per_min; DXOGLUEX_k is "DXO glucuronide urinary excretion rate";  // SBO:0000009

  // Reactions:
  DXMEX: dxm => dxm_urine; DXMEX_k*Vki*dxm; DXMEX is "DXM urinary excretion";  // SBO:0000655
  DXOEX: dxo => dxo_urine; DXOEX_k*Vki*dxo; DXOEX is "DXO urinary excretion";  // SBO:0000655
  DXOGLUEX: dxo_glu => dxo_glu_urine; DXOGLUEX_k*Vki*dxo_glu; DXOGLUEX is "DXO glucuronide urinary excretion";  // SBO:0000655

  // Unit definitions:
  unit g_per_mole = gram / mole; g_per_mole is "g/mole";
  unit litre_per_min = litre / (60 second); litre_per_min is "litre/min";
  unit m2 = metre^2; m2 is "meter^2";
  unit mM = 1e-3 mole / litre; mM is "mmole/liter";
  unit mg = 1e-3 gram;
  unit microM = 1e-6 mole / litre; microM is "micromole/liter";
  unit min = 60 second;
  unit mmole = 1e-3 mole;
  unit mmole_per_min = 1e-3 mole / (60 second); mmole_per_min is "mmole/min";
  unit mmole_per_min_l = 1e-3 mole / (60 second * litre); mmole_per_min_l is "mmole/min/liter";
  unit per_min = 1 / (60 second); per_min is "1/min";
end
